# 1 - система формирования комплектов
A1 := [1, 2, 3, 4; 1/2, 1, 5, 3; 1/3, 1/5, 1, 1/3; 1/4, 1/3, 3, 1]
A2 := [1, 2, 3, 4; 1/2, 1, 6, 3; 1/3, 1/6, 1, 1/4; 1/4, 1/3, 4, 1]
A3 := [1, 5, 9, 7; 1/5, 1, 3, 1/5; 1/9, 1/3, 1, 1/5; 1/7, 5, 5, 1]  # 2 - система формирования групп партий и комплектов
# 3 - директивные сроки выпуска комплекта
A := [
    1, 1/3, 1/5, 1/7, 1/9, 1/7;
    3, 1, 1/3, 1/5, 1/9, 1/7;
    5, 3, 1, 1/7, 1/5, 1/3;
    7, 5, 3, 1, 1/5, 1/3;
    9, 9, 7, 5, 1, 3;
    7, 7, 3, 3, 1/3, 1
]  # 4 - динамическое расписание
A4 := [1, 3, 5, 5; 1/3, 1, 3, 3; 1/5, 1/3, 1, 1/3; 1/5, 1/3, 3, 1]
A5 := [1, 5, 9, 7; 1/5, 1, 3, 1/5; 1/9, 1/3, 1, 1/5; 1/7, 5, 5, 1]
A6 := [1, 7, 9, 1/3; 1/7, 1, 3, 1/3; 1/9, 1/3, 1, 1/5; 3, 3, 5, 1]
W := [1/(A[0, 0] + A[0, 1] + A[0, 2] + A[0, 3] + A[0, 4] + A[0, 5]), 1/(A[1, 0] + A[1, 1] + A[1, 2] + A[1, 3] + A[1, 4] + A[1, 5]), 1/(A[2, 0] + A[2, 1] + A[2, 2] + A[2, 3] + A[2, 4] + A[2, 5]), 1/(A[3, 0] + A[3, 1] + A[3, 2] + A[3, 3] + A[3, 4] + A[3, 5]), 1/(A[4, 0] + A[4, 1] + A[4, 2] + A[4, 3] + A[4, 4] + A[4, 5]), 1/(A[5, 0] + A[5, 1] + A[5, 2] + A[5, 3] + A[5, 4] + A[5, 5])]
W = [0.518092, 0.208886, 0.103346, 0.0604839, 0.0294118, 0.046875]
sum := W[0, 0] + W[0, 1] + W[0, 2] + W[0, 3] + W[0, 4] + W[0, 5] = 0.967095
W := W/sum = [0.53572, 0.215993, 0.106863, 0.0625418, 0.0304125, 0.0484699]
q1 := [1/(A1[0, 0] + A1[0, 1] + A1[0, 2] + A1[0, 3]), 1/(A1[1, 0] + A1[1, 1] + A1[1, 2] + A1[1, 3]), 1/(A1[2, 0] + A1[2, 1] + A1[2, 2] + A1[2, 3]), 1/(A1[3, 0] + A1[3, 1] + A1[3, 2] + A1[3, 3])]
q2 := [1/(A2[0, 0] + A2[0, 1] + A2[0, 2] + A2[0, 3]), 1/(A2[1, 0] + A2[1, 1] + A2[1, 2] + A2[1, 3]), 1/(A2[2, 0] + A2[2, 1] + A2[2, 2] + A2[2, 3]), 1/(A2[3, 0] + A2[3, 1] + A2[3, 2] + A2[3, 3])]
q3 := [1/(A3[0, 0] + A3[0, 1] + A3[0, 2] + A3[0, 3]), 1/(A3[1, 0] + A3[1, 1] + A3[1, 2] + A3[1, 3]), 1/(A3[2, 0] + A3[2, 1] + A3[2, 2] + A3[2, 3]), 1/(A3[3, 0] + A3[3, 1] + A3[3, 2] + A3[3, 3])]
q4 := [1/(A4[0, 0] + A4[0, 1] + A4[0, 2] + A4[0, 3]), 1/(A4[1, 0] + A4[1, 1] + A4[1, 2] + A4[1, 3]), 1/(A4[2, 0] + A4[2, 1] + A4[2, 2] + A4[2, 3]), 1/(A4[3, 0] + A4[3, 1] + A4[3, 2] + A4[3, 3])]
q5 := [1/(A5[0, 0] + A5[0, 1] + A5[0, 2] + A5[0, 3]), 1/(A5[1, 0] + A5[1, 1] + A5[1, 2] + A5[1, 3]), 1/(A5[2, 0] + A5[2, 1] + A5[2, 2] + A5[2, 3]), 1/(A5[3, 0] + A5[3, 1] + A5[3, 2] + A5[3, 3])]
q6 := [1/(A6[0, 0] + A6[0, 1] + A6[0, 2] + A6[0, 3]), 1/(A6[1, 0] + A6[1, 1] + A6[1, 2] + A6[1, 3]), 1/(A6[2, 0] + A6[2, 1] + A6[2, 2] + A6[2, 3]), 1/(A6[3, 0] + A6[3, 1] + A6[3, 2] + A6[3, 3])]
q1 = [0.1, 0.105263, 0.535714, 0.218182]
q2 = [0.1, 0.0952381, 0.571429, 0.179104]
v1 := [q1[0, 0]; q2[0, 0]; q3[0, 0]; q4[0, 0]; q5[0, 0]; q6[0, 0]]
v2 := [q1[0, 1]; q2[0, 1]; q3[0, 1]; q4[0, 1]; q5[0, 1]; q6[0, 1]]
v3 := [q1[0, 2]; q2[0, 2]; q3[0, 2]; q4[0, 2]; q5[0, 2]; q6[0, 2]]
v4 := [q1[0, 3]; q2[0, 3]; q3[0, 3]; q4[0, 3]; q5[0, 3]; q6[0, 3]]
q3 = [0.0454545, 0.227273, 0.608108, 0.0897436]
q4 = [0.0714286, 0.136364, 0.535714, 0.220588]
q5 = [0.0454545, 0.227273, 0.608108, 0.0897436]
q6 = [0.0576923, 0.223404, 0.608108, 0.0833333]
D := [min(v1), min(v2), min(v3), min(v4)]
D = [0.0454545, 0.0952381, 0.535714, 0.0833333]
Q1 := [q1[0, 0]^W[0, 0], q1[0, 1]^W[0, 0], q1[0, 2]^W[0, 0], q1[0, 3]^W[0, 0]]
Q2 := [q2[0, 0]^W[0, 1], q2[0, 1]^W[0, 1], q2[0, 2]^W[0, 1], q2[0, 3]^W[0, 1]]
Q3 := [q3[0, 0]^W[0, 2], q3[0, 1]^W[0, 2], q3[0, 2]^W[0, 2], q3[0, 3]^W[0, 2]]
Q4 := [q4[0, 0]^W[0, 3], q4[0, 1]^W[0, 3], q4[0, 2]^W[0, 3], q4[0, 3]^W[0, 3]]
Q5 := [q5[0, 0]^W[0, 4], q5[0, 1]^W[0, 4], q5[0, 2]^W[0, 4], q5[0, 3]^W[0, 4]]
Q6 := [q6[0, 0]^W[0, 5], q6[0, 1]^W[0, 5], q6[0, 2]^W[0, 5], q6[0, 3]^W[0, 5]]
Q1 = [0.29126, 0.299374, 0.715788, 0.442376]
Q2 = [0.608145, 0.601769, 0.886146, 0.689725]
Q3 = [0.718696, 0.853569, 0.948234, 0.772885]
Q4 = [0.84785, 0.882841, 0.961716, 0.909801]
v1 := [Q1[0, 0]; Q2[0, 0]; Q3[0, 0]; Q4[0, 0]; Q5[0, 0]; Q6[0, 0]]
v2 := [Q1[0, 1]; Q2[0, 1]; Q3[0, 1]; Q4[0, 1]; Q5[0, 1]; Q6[0, 1]]
v3 := [Q1[0, 2]; Q2[0, 2]; Q3[0, 2]; Q4[0, 2]; Q5[0, 2]; Q6[0, 2]]
v4 := [Q1[0, 3]; Q2[0, 3]; Q3[0, 3]; Q4[0, 3]; Q5[0, 3]; Q6[0, 3]]
Q5 = [0.910277, 0.955941, 0.984987, 0.929305]
Q6 = [0.870866, 0.929931, 0.976179, 0.886527]
D := [min(v1), min(v2), min(v3), min(v4)]
D = [0.29126, 0.299374, 0.715788, 0.442376]
