l[0, 1] := 2
l[1, 2] := 2
l[2, 3] := 2
l[3, 4] := 1
l[3, 5] := 1
l[4, 3] := 1
p := [1; 0; 0; 0; 0; 0; 0; 0; 0]
l[5, 6] := 1
l[5, 7] := 2
l[6, 8] := 1
l[7, 8] := 1
l[8, 0] := 0.5
l = [
    0, 2, 0, 0, 0, 0, 0, 0, 0;
    0, 0, 2, 0, 0, 0, 0, 0, 0;
    0, 0, 0, 2, 0, 0, 0, 0, 0;
    0, 0, 0, 0, 1, 1, 0, 0, 0;
    0, 0, 0, 1, 0, 0, 0, 0, 0;
    0, 0, 0, 0, 0, 0, 1, 2, 0;
    0, 0, 0, 0, 0, 0, 0, 0, 1;
    0, 0, 0, 0, 0, 0, 0, 0, 1;
    0.5, 0, 0, 0, 0, 0, 0, 0, 0
]
AA := [
    -l[0, 1], 0, 0, 0, 0, 0, 0, 0, l[8, 0];
    l[0, 1], -l[1, 2], 0, 0, 0, 0, 0, 0, 0;
    0, l[1, 2], -l[2, 3], 0, 0, 0, 0, 0, 0;
    0, 0, l[2, 3], -l[3, 4] - l[3, 5], l[4, 3], 0, 0, 0, 0;
    0, 0, 0, l[3, 4], -l[4, 3], 0, 0, 0, 0;
    0, 0, 0, l[3, 5], 0, -l[5, 6] - l[5, 7], 0, 0, 0;
    0, 0, 0, 0, 0, l[5, 6], -l[6, 8], 0, 0;
    0, 0, 0, 0, 0, l[5, 6], 0, -l[7, 8], 0;
    0, 0, 0, 0, 0, 0, l[6, 8], l[7, 8], -l[8, 0]
]
D(t, p) := [
    l[8, 0]*p[8] - l[0, 1]*p[0];
    l[0, 1]*p[0] - l[1, 2]*p[1];
    l[1, 2]*p[1] - l[2, 3]*p[2];
    l[4, 3]*p[4] + l[2, 3]*p[2] - l[3, 4]*p[3] - l[3, 5]*p[3];
    l[3, 4]*p[3] - l[4, 3]*p[4];
    l[3, 5]*p[3] - l[5, 6]*p[5] - l[5, 7]*p[5];
    l[5, 6]*p[5] - l[6, 8]*p[6];
    l[5, 6]*p[5] - l[7, 8]*p[7];
    l[6, 8]*p[6] + l[7, 8]*p[7] - l[8, 0]*p[8]
]
eigenvals(AA) = [-3.24734 + 0.470148i; -3.24734 - 0.470148i; -2.19517 + 1.06038i; -2.19517 - 1.06038i; -0.779323 + 0.708876i; -0.779323 - 0.708876i; -0.0563264; -1; -1]
AA = [
    -2, 0, 0, 0, 0, 0, 0, 0, 0.5;
    2, -2, 0, 0, 0, 0, 0, 0, 0;
    0, 2, -2, 0, 0, 0, 0, 0, 0;
    0, 0, 2, -2, 1, 0, 0, 0, 0;
    0, 0, 0, 1, -1, 0, 0, 0, 0;
    0, 0, 0, 1, 0, -3, 0, 0, 0;
    0, 0, 0, 0, 0, 1, -1, 0, 0;
    0, 0, 0, 0, 0, 1, 0, -1, 0;
    0, 0, 0, 0, 0, 0, 1, 1, -0.5
]
BB := [1; 0; 0; 0; 0; 0; 0; 0; 0]
lsolve(AA, BB) = [-1.5; -1.5; -1.5; -3; -3; -1; -1; -1; -4]
t := 7
n := 1 .. 15
Z := rkfixed(p, 0, t, 15, D)
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Z = [
    0, 1, 0, 0, 0, 0, 0, 0, 0, 0;
    0.466667, 0.398334, 0.342268, 0.218746, 0.00903374, 0.0158091, 0.0158091, 0, 0, 0;
    0.933333, 0.158753, 0.272737, 0.291415, 0.16524, 0.0497522, 0.036749, 0.00650163, 0.00650163, 0.00385122;
    1.4, 0.0646537, 0.163435, 0.244239, 0.252172, 0.113833, 0.0677001, 0.0230667, 0.0230667, 0.0158001;
    1.86667, 0.0301451, 0.0887392, 0.167682, 0.265022, 0.170043, 0.0838127, 0.043115, 0.043115, 0.0406508;
    2.33333, 0.0210917, 0.0489929, 0.104434, 0.240338, 0.201328, 0.0840663, 0.0586309, 0.0586309, 0.0752787;
    2.8, 0.0230184, 0.0323575, 0.0640617, 0.205495, 0.209008, 0.075808, 0.0665998, 0.0665998, 0.112372;
    3.26667, 0.0290824, 0.0287108, 0.0430745, 0.173801, 0.201167, 0.0652993, 0.0679338, 0.0679338, 0.145382;
    3.73333, 0.035812, 0.0313163, 0.0350737, 0.149623, 0.185866, 0.0558631, 0.0650012, 0.0650012, 0.170625;
    4.2, 0.0415215, 0.03612, 0.034434, 0.133029, 0.1688, 0.048653, 0.0600734, 0.0600734, 0.187176;
    4.66667, 0.0455752, 0.0409061, 0.0371689, 0.122482, 0.153179, 0.0436771, 0.0547509, 0.0547509, 0.195924;
    5.13333, 0.0479403, 0.0446479, 0.0408127, 0.116139, 0.14035, 0.0404856, 0.0499322, 0.0499322, 0.198595;
    5.6, 0.0488849, 0.0470392, 0.0440459, 0.112391, 0.130506, 0.0385343, 0.0459858, 0.0459858, 0.197062;
    6.06667, 0.0487806, 0.0481662, 0.0463152, 0.110036, 0.123247, 0.0373466, 0.0429501, 0.0429501, 0.19296;
    6.53333, 0.0479884, 0.0482884, 0.0475245, 0.108271, 0.117955, 0.0365658, 0.0406947, 0.0406947, 0.187534;
    7, 0.0468033, 0.0477053, 0.0478124, 0.106623, 0.114013, 0.0359549, 0.0390293, 0.0390293, 0.181627
]
a2 := [
    1, 1, 1, 1, 1, 1, 1, 1, 1;
    l[0, 1], -l[1, 2], 0, 0, 0, 0, 0, 0, 0;
    0, l[1, 2], -l[2, 3], 0, 0, 0, 0, 0, 0;
    0, 0, l[2, 3], -l[3, 4] - l[3, 5], l[4, 3], 0, 0, 0, 0;
    0, 0, 0, l[3, 4], -l[4, 3], 0, 0, 0, 0;
    0, 0, 0, l[3, 5], 0, -l[5, 6] - l[5, 7], 0, 0, 0;
    0, 0, 0, 0, 0, l[5, 6], -l[6, 8], 0, 0;
    0, 0, 0, 0, 0, l[5, 6], 0, -l[7, 8], 0;
    0, 0, 0, 0, 0, 0, l[6, 8], l[7, 8], -l[8, 0]
]
eigenvals(a2) = [1.98954; -3.16463 + 0.501337i; -3.16463 - 0.501337i; -1.85279 + 0.89369i; -1.85279 - 0.89369i; -0.727349 + 0.529976i; -0.727349 - 0.529976i; -1; -1]
lsolve(a2, p) = [0.0857143; 0.0857143; 0.0857143; 0.171429; 0.171429; 0.0571429; 0.0571429; 0.0571429; 0.228571]
